FINISH
/CLEAR, START
/title, Y93
/filename, struc_model_1
/prep7
/units, MPa
/nerr, 200, 99999
*afun, deg
/rgb, index, 100, 100, 100, 0
/rgb,index, 80, 80, 80, 13
/rgb,index, 60, 60, 60, 14
/rgb,index, 0, 0, 0, 15
/plopts, logo, 0
/plopts, date, 0
/triad, rbot

BLC4, -125, -125, 250, 250
BLC4, -79, -79, 158, 158
AOVLAP, ALL
ADELE, 2

LSEL, S, LINE, , 5, 8, 1
LGEN, 2, 5, 8, 1, 0, 0, 73, 0, 0, 0

ALLS

*DO, I, 5, 8, 1
  L, I, I+4
*ENDDO

AL, 5, 13, 9, 14
AL, 6, 14, 10, 15
AL, 7, 15, 11, 16
AL, 8, 16, 12, 13

WPAVE, 0, 0, 50
BLC4, -122, -122, 244, 244
WPCSYS, -1, 0
AOVLAP, ALL
ADELE, 15

LSEL, S, LINE, , 17, 20, 1
LGEN, 2, 17, 20, 1, 0, 0, 16.5, 0, 0, 0

*DO, I, 13, 16, 1
  L, I, I+8
*ENDDO

AL, 17, 34, 13, 33
AL, 18, 35, 14, 34
AL, 19, 35, 15, 36
AL, 20, 36, 16, 33

ASEL, S, LOC, Z, 0
WPROTA, 0, 90, 0
ASBW, ALL
WPROTA, 0, 0, 90
ASBW, ALL
WPOFFS, 0, 0, 100
ASBW, ALL
WPOFFS, 0, 0, -100
WPOFFS, 0, 0, -100
ASBW, ALL
WPROTA, 0, 0, 90
WPOFFS, 0, 0, -100
ASBW, ALL
WPOFFS, 0, 0, 200
ASBW, ALL
WPCSYS, -1, 0

ALLS

ASEL, ALL
WPAVE, 0, 0, 290
CSYS, 4
ARSYM, Z, ALL, , , , 0, 0
CSYS, 0
WPCSYS, -1, 0

ASEL, S, AREA, , 15
ASEL, A, AREA, , 19
ASEL, A, AREA, , 23
ASEL, A, AREA, , 34
ASEL, A, AREA, , 44
ASEL, A, AREA, , 1
ASEL, A, AREA, , 2
ASEL, A, AREA, , 4
ASEL, A, AREA, , 5
ASEL, A, AREA, , 16
L, 51, 22
L, 54, 23
L, 60, 24
L, 52, 21
AL, 50, 156, 13, 153
AL, 83, 153, 14, 154
AL, 90, 154, 15, 155
AL, 92, 155, 16, 156
KWPAVE, 16
WPROTA, 0, 90, 0
WPOFFS, 0, 0, 20
ASBW, ALL
WPOFFS, 20, 0, 0
WPROTA, 0, 0, 90
ASBW, ALL
KWPAVE, 14
WPOFFS, 0, 0, -20
ASBW, ALL
WPOFFS, 20, 0, 0
WPROTA, 0, 0, 90
ASBW, ALL

ALLS
WPCSYS, -1, 0
L, 9, 78
L, 11, 79
L, 12, 80
L, 10, 77
AL,12, 163, 120, 160
AL, 9, 160, 114, 164
AL, 10, 164, 117, 161
AL, 11, 161, 119, 163

ASEL, S, LOC, Z, 50
AGEN, 2, ALL, , , 0, 0, 240, , 0, 0
ALLS
AOVLAP, ALL
